*Heading
** Generated by: Abaqus/CAE 2019
*Preprint, echo=NO, model=NO, history=NO, contact=NO
**
** PARTS
**
*Part, name=PART-1
*Node
      1,           1.,           1.,           1.
      2,           1.,           0.,           1.
      3,           1.,           1.,           0.
      4,           1.,           0.,           0.
      5,           0.,           1.,           1.
      6,           0.,           0.,           1.
      7,           0.,           1.,           0.
      8,           0.,           0.,           0.
*Element, type=C3D8R
1, 5, 6, 8, 7, 1, 2, 4, 3
*Nset, nset=_PICKEDSET2, internal, generate
 1,  8,  1
*Elset, elset=_PICKEDSET2, internal
 1,
*Nset, nset=TOPSURF, generate
 1,  7,  2
*Elset, elset=TOPSURF
 1,
*Nset, nset=NODEONTOPSURF
 7,
** Section: Section-1-_PICKEDSET2
*Solid Section, elset=_PICKEDSET2, material=MC
,
*End Part
**
**
** ASSEMBLY
**
*Assembly, name=Assembly
**
*Instance, name=PART-1-1, part=PART-1
*End Instance
**
*Nset, nset=NODEONTOPSURF, instance=PART-1-1
 7,
*Nset, nset=TOPSURF, instance=PART-1-1, generate
 1,  7,  2
*Elset, elset=TOPSURF, instance=PART-1-1
 1,
*Nset, nset=_PICKEDSET4, internal, instance=PART-1-1, generate
 5,  8,  1
*Elset, elset=_PICKEDSET4, internal, instance=PART-1-1
 1,
*Nset, nset=_PICKEDSET5, internal, instance=PART-1-1, generate
 2,  8,  2
*Elset, elset=_PICKEDSET5, internal, instance=PART-1-1
 1,
*Nset, nset=_PICKEDSET6, internal, instance=PART-1-1
 3, 4, 7, 8
*Elset, elset=_PICKEDSET6, internal, instance=PART-1-1
 1,
*Nset, nset=_PICKEDSET7, internal, instance=PART-1-1, generate
 1,  8,  1
*Elset, elset=_PICKEDSET7, internal, instance=PART-1-1
 1,
*Nset, nset=_PICKEDSET8, internal, instance=PART-1-1, generate
 1,  7,  2
*Elset, elset=_PICKEDSET8, internal, instance=PART-1-1
 1,
*Elset, elset=__PICKEDSURF9_S2, internal, instance=PART-1-1
 1,
*Elset, elset=__PICKEDSURF9_S3, internal, instance=PART-1-1
 1,
*Elset, elset=__PickedSurf20_S2, internal, instance=PART-1-1
 1,
*Elset, elset=__PickedSurf20_S3, internal, instance=PART-1-1
 1,
*Surface, type=ELEMENT, name=_PickedSurf20, internal
__PickedSurf20_S2, S2
__PickedSurf20_S3, S3
*End Assembly
**
** MATERIALS
**
*Material, name=MC
*Elastic
MATPARAM00, MATPARAM01
*Mohr Coulomb
MATPARAM02, MATPARAM03
*Mohr Coulomb Hardening
MATPARAM04, 0.
**
**
** BOUNDARY CONDITIONS
**
** Name: Disp-BC-1 Type: Displacement/Rotation
*Boundary
_PICKEDSET4, 1, 1
** Name: Disp-BC-2 Type: Displacement/Rotation
*Boundary
_PICKEDSET5, 2, 2
** Name: Disp-BC-3 Type: Displacement/Rotation
*Boundary
_PICKEDSET6, 3, 3
** Name: Disp-BC-4 Type: Displacement/Rotation
*Boundary
_PICKEDSET8, 2, 2
**
** PREDEFINED FIELDS
**
** Name: IC-1   Type: Stress
*Initial Conditions, type=STRESS
_PICKEDSET7, -0.1, -0.1, -0.1, 0., 0., 0.
** ----------------------------------------------------------------
**
** STEP: confining_pressure
**
*Step, name=confining_pressure, nlgeom=NO
*Static
1., 1., 1e-05, 1.
**
** LOADS
**
** Name: Load-1   Type: Pressure
*Dsload
_PickedSurf20, P, 0.1
**
** OUTPUT REQUESTS
**
*Restart, write, frequency=0
*Output, field, frequency=0
*Output, history, frequency=0
*End Step
** ----------------------------------------------------------------
**
** STEP: loading
**
*Step, name=loading, nlgeom=NO
*Static
0.01, 1., 1e-05, 0.01
**
** BOUNDARY CONDITIONS
**
** Name: Disp-BC-4 Type: Displacement/Rotation
*Boundary
_PICKEDSET8, 2, 2, -0.02
**
** OUTPUT REQUESTS
**
*Restart, write, frequency=0
**
** FIELD OUTPUT: F-Output-1
**
*Output, field
*Node Output
RF, U
*Element Output, directions=YES
E, PE, S, PEEQ
*Output, history, frequency=0
*End Step
